# Restep Boost Converter Design Calculations
# www.restep.eco
# Chris Arntzen 1/19/18, edited 12/19/20
# These design calculations and the nomenclature follow the TI LM5022-Q1 Detailed Design Procedure.  Items with orange background are actual selected components and values.
# Copyright (c) 2021, RESTEP
#
# Permission is hereby granted, free of charge, to any person obtaining a copy of this software and associated documentation files (the "Software"), to deal in the Software without restriction, including without limitation the rights to use, copy, modify, merge, publish, distribute, sublicense, and/or sell copies of the Software, and to permit persons to whom the Software is furnished to do so, subject to the following conditions:
#
# The above copyright notice and this permission notice shall be included in all copies or substantial portions of the Software.
#
# THE SOFTWARE IS PROVIDED "AS IS", WITHOUT WARRANTY OF ANY KIND, EXPRESS OR IMPLIED, INCLUDING BUT NOT LIMITED TO THE WARRANTIES OF MERCHANTABILITY, FITNESS FOR A PARTICULAR PURPOSE AND NONINFRINGEMENT. IN NO EVENT SHALL THE AUTHORS OR COPYRIGHT HOLDERS BE LIABLE FOR ANY CLAIM, DAMAGES OR OTHER LIABILITY, WHETHER IN AN ACTION OF CONTRACT, TORT OR OTHERWISE, ARISING FROM, OUT OF OR IN CONNECTION WITH THE SOFTWARE OR THE USE OR OTHER DEALINGS IN THE SOFTWARE.
# This worksheet is intended to assist in design with a Boost Converter topology using the Texas Instruments LM5022-Q1 controller.  This worksheet provides no guarantee as to the performance of the circuit; it is the responsibility of the end user to ensure the safety and performance of the circuit.
# Boost Converter Calculations: 48V 120W using LM5022-Q1 Controller____________________
V_in_min := 10.5
V_in_max := 25
I_out := 2.5
η := 0.9
V_d := 0.5
# Output Voltage Setting_________________________________________________________
V_fb_min := 1.225
V_fb_max := 1.275
V_div_ratio := 1.25/48 = 0.0260417
tol_R := 0.001
TCR := 25
T_range := 60
R_FB1 := 1.3*10^3
R_FB1_min := R_FB1*(1 - tol_R) - (R_FB1*TCR*10^-6*T_range) = 1296.75
R_FB1_max := R_FB1*(1 + tol_R) + (R_FB1*TCR*10^-6*T_range) = 1303.25
R_FB2 := 48.7*10^3
R_FB2_min := R_FB2*(1 - tol_R) - (R_FB2*TCR*10^-6*T_range) = 48578.2
R_FB2_max := R_FB2*(1 + tol_R) + (R_FB2*TCR*10^-6*T_range) = 48821.8
V_out_min := V_fb_min*((R_FB1_max + R_FB2_min)/R_FB1_max) = 46.8865
V_out_max := V_fb_max*((R_FB1_min + R_FB2_max)/R_FB1_min) = 49.2779
# Switching Frequency___________________________________________________________
f_s_nom := 400*10^3
tol_fosc := .1375
R_T_calc := (1 - 8*10^-8*f_s_nom)/(f_s_nom*5.77*10^-11) = 41941.1
R_T := 42.2*10^3
R_T_min := R_T*(1 - tol_R) - (R_T*TCR*10^-6*T_range) = 42094.5
R_T_max := R_T*(1 + tol_R) + (R_T*TCR*10^-6*T_range) = 42305.5
f_s_min := (1/(8*10^-8 + 5.77*10^-11*R_T_max))*(1 - tol_fosc) = 342122
f_s_max := (1/(8*10^-8 + 5.77*10^-11*R_T_min))*(1 + tol_fosc) = 453395
# Power and Duty Cycle__________________________________________________________
P_out_min := V_out_min*I_out = 117.216
P_out_max := V_out_max*I_out = 123.195
P_in_min := P_out_min/η = 130.24
P_in_max := P_out_max/η = 136.883
I_in_min := P_in_min/V_in_max = 5.20961
I_in_max := P_in_max/V_in_min = 13.0365
D_min := (V_out_min - V_in_max + V_d)/(V_out_min + V_d) = 0.472424
D_max := (V_out_max - V_in_min + V_d)/(V_out_max + V_d) = 0.789063
# Inductor and Currents__________________________________________________________
# Coilcraft SER2918H-153KL  15uH  10%  DCR=2.86mΩ  Isat=21.9A  Irms=28A
L_nom := 15*10^-6
tol_L := 0.1
L_min := L_nom*(1 - tol_L) = 1.35e-5
I_sat_rat := 21.9
I_rms_rat := 28
L_max := L_nom*(1 + tol_L) = 1.65e-5
ΔI_L_min := (V_in_min/L_max)*(D_max/f_s_max) = 1.10749
ΔI_L_max := (V_in_max/L_min)*(D_min/f_s_min) = 2.55715
I_Lrms_min := sqrt(I_in_min^2 + (ΔI_L_max/12)^2) = 5.21397
I_Lrms_max := sqrt(I_in_max^2 + (ΔI_L_min/12)^2) = 13.0368
I_Lpk_min := I_in_min + ΔI_L_max/2 = 6.48819
I_Lpk_max := I_in_max + ΔI_L_min/2 = 13.5902
I_Lpk_op := I_Lpk_max/I_sat_rat = 0.620558
I_Lrms_op := I_Lrms_max/I_rms_rat = 0.4656
K_min := ΔI_L_min/I_Lrms_max = 0.0849512
K_max := ΔI_L_max/I_Lrms_min = 0.490442
# Output Capacitor and Output Voltage Ripple________________________________________
# Kemet  C1812C335K1RAC7800  3.3uF  X7R  1812  100V  10%  20% DC Bias Derating
tol_C := 0.1
DC_bias := 0.2
Qty := 3
C_nom := 3.3*10^-6
C_out_min := Qty*C_nom*(1 - tol_C)*(1 - DC_bias) = 7.128e-6
C_out_max := Qty*C_nom*(1 + tol_C)*(1 - DC_bias) = 8.712e-6
ΔV_out_max := D_max*I_out/(f_s_min*C_out_min) = 0.808914
ΔV_percent := ΔV_out_max/V_out_max = 0.0164154
# Current Sense Resistor Calculations_______________________________________________
V_CL_nom := 0.5
V_CL_min := 0.434
V_CL_max := 0.55
I_LIM := 20
R_SNS_min_calc := L_min*f_s_min*V_CL_min/((V_out_max - V_in_min)*3*D_max + L_min*f_s_min*I_LIM) = 0.0108841
R_SNS_max_calc := L_max*f_s_max*V_CL_max/((V_out_min - V_in_min)*3*D_max + L_max*f_s_max*I_LIM) = 0.0174528
# VISHAY  WSHM2818R0200FEA  RES 0.02 OHM 1% 7W 75PPM 2818
tol_Rsns := 0.01
TCR_Rsns := 75
R_SNS := 20*10^-3
R_SNS_min := R_SNS*(1 - tol_Rsns) - (R_SNS*TCR_Rsns*10^-6*T_range) = 0.01971
R_SNS_max := R_SNS*(1 + tol_Rsns) + (R_SNS*TCR_Rsns*10^-6*T_range) = 0.02029
I_Rsns_rms_min := sqrt(D_min*(I_Lpk_min^2 + ΔI_L_max^2/3 - I_Lpk_min*ΔI_L_max)) = 3.61649
I_Rsns_rms_max := sqrt(D_max*(I_Lpk_max^2 + ΔI_L_min^2/3 - I_Lpk_max*ΔI_L_min)) = 11.5837
P_Rsns_min := I_Rsns_rms_min^2*R_SNS_min = 0.257788
P_Rsns_max := I_Rsns_rms_max^2*R_SNS_max = 2.72255
# Current Sense Filter ___________________________________________________________
R_S1 := 499
C_CS := 470*10^-12
f_CS := 1/(2*π*R_S1*C_CS) = 678612
# Slope Compensation Resistor_____________________________________________________
R_S2_min_calc := (V_CL_min - I_LIM*R_SNS_min)/(45*10^-6*D_max) = 1120.88
tol_RS := 0.001
R_S2_max_calc := (V_CL_max - I_LIM*R_SNS_max)/(45*10^-6*D_min) = 6782.99
TCR_RS := 25
R_S2 := 1.69*10^3
R_S2_min := R_S2*(1 - tol_RS) - (R_S2*TCR_RS*10^-6*T_range) = 1685.77
R_S2_max := R_S2*(1 + tol_RS) + (R_S2*TCR_RS*10^-6*T_range) = 1694.22
R_S1_min := R_S1*(1 - tol_RS) - (R_S1*TCR_RS*10^-6*T_range) = 497.752
R_S1_max := R_S1*(1 + tol_RS) + (R_S1*TCR_RS*10^-6*T_range) = 500.247
# Current Limit Trip Point_________________________________________________________
I_TRIP_min := (V_CL_min - 45*10^-6*D_max*(R_S2_max + R_S1_max + 2000))/R_SNS_max = 14.0495
I_TRIP_max := (V_CL_max - 45*10^-6*D_min*(R_S2_min + R_S1_min + 2000))/R_SNS_min = 23.3923
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# Slope Compensation Comparison_________________________________________________
S_n_min := R_SNS_min*V_in_min/L_max = 12542.7
S_n_max := R_SNS_max*V_in_max/L_min = 37574.1
S_e_min := 45*10^-6*f_s_min*(R_S1_min + R_S2_min + 2000) = 64407.5
S_e_max := 45*10^-6*f_s_max*(R_S1_max + R_S2_max + 2000) = 85578.8
# Want slope compensation ramp ratio of 1, or at least 0.5 (Se/Sn)
SC_ratio_min := S_e_min/S_n_max = 1.71415
SC_ratio_max := S_e_max/S_n_min = 6.82298
# Loss Calculations______________________________________________________________
# VISHAY  SQJA92EP-T1_GE3  MOSFET
R_DS_ON_max := 0.0095*1.3 = 0.01235
t_r := 10*10^-9
t_f := 25*10^-9
Q_g := 45*10^-9
I_CC := 0.004
I_GC := Q_g*f_s_max = 0.0204028
P_Q_max := V_in_max*(I_CC + I_GC) = 0.610069
P_SW_max := 0.5*V_in_min*I_in_max*(t_r + t_f)*f_s_max = 1.08608
P_COND_max := D_max*I_in_max^2*R_DS_ON_max = 1.65615
P_FET_max := P_SW_max + P_COND_max = 2.74223
# NOTE: the FET selected above failed during testing at full load and low line, likely due to operation outside of the FET SOA.  The FET below is the chosen replacement and did not fail during testing.
# VISHAY  SUM70060E  MOSFET
R_DS_ON_max := 0.0062*1.3 = 0.00806
t_r := 44*10^-9
t_f := 18*10^-9
Q_g := 81*10^-9
I_CC := 0.004
I_GC := Q_g*f_s_max = 0.036725
P_Q_max := V_in_max*(I_CC + I_GC) = 1.01812
P_SW_max := 0.5*V_in_min*I_in_max*(t_r + t_f)*f_s_max = 1.92392
P_COND_max := D_max*I_in_max^2*R_DS_ON_max = 1.08085
P_FET_max := P_SW_max + P_COND_max = 3.00478
# Diodes Inc.  SDT5H100P5-7  Schottky Rectifier
P_D_max := V_d*I_out = 1.25
# Inductor losses estimated by Coilcraft online loss calculator @ 50degC, max Iin & fs
P_L_max := 0.554  # Almost all loss is due to winding DCR
P_LOSS_max := P_L_max + P_D_max + P_FET_max + P_Q_max + P_Rsns_max = 8.54945
η_est := P_out_max/(P_out_max + P_LOSS_max) = 0.935106
# Under Voltage Lock Out_________________________________________________________
V_SD_min := 1.22
V_SD_max := 1.28
tol_Ruv := 0.01
TCR_Ruv := 100
R_UVbot := 1.47*10^3
R_UVtop := 10*10^3
R_UVbot_min := R_UVbot*(1 - tol_Ruv) - (R_UVbot*TCR_Ruv*10^-6*T_range) = 1446.48
R_UVbot_max := R_UVbot*(1 + tol_Ruv) + (R_UVbot*TCR_Ruv*10^-6*T_range) = 1493.52
R_UVtop_min := R_UVtop*(1 - tol_Ruv) - (R_UVtop*TCR_Ruv*10^-6*T_range) = 9840
R_UVtop_max := R_UVtop*(1 + tol_Ruv) + (R_UVtop*TCR_Ruv*10^-6*T_range) = 10160
V_UVLO_min := V_SD_min*((R_UVbot_max + R_UVtop_min)/R_UVbot_max) = 9.25792
V_UVLO_max := V_SD_max*((R_UVbot_min + R_UVtop_max)/R_UVbot_min) = 10.2707
# Soft Start____________________________________________________________________
I_SS_min := 7*10^-6
I_SS_max := 13*10^-6
V_SS_OFF_min := 0.344
V_SS_OFF_max := 0.75
C_SS := 100*10^-9
C_SS_min := C_SS*0.9*0.85 = 7.65e-8
C_SS_max := C_SS*1.1*1.15 = 1.265e-7
t_SS_min := V_SS_OFF_min*C_SS_min/I_SS_max = 0.00202431
t_SS_max := V_SS_OFF_max*C_SS_max/I_SS_min = 0.0135536
